// generated by create_loads.py
#include using(LOAD=R1-12_47-1_load_1) "randomizer.glm"
#include using(LOAD=R1-12_47-1_load_2) "randomizer.glm"
#include using(LOAD=R1-12_47-1_load_3) "randomizer.glm"
#include using(LOAD=R1-12_47-1_load_4) "randomizer.glm"
#include using(LOAD=R1-12_47-1_load_5) "randomizer.glm"
#include using(LOAD=R1-12_47-1_load_6) "randomizer.glm"
#include using(LOAD=R1-12_47-1_load_7) "randomizer.glm"
#include using(LOAD=R1-12_47-1_load_8) "randomizer.glm"
#include using(LOAD=R1-12_47-1_load_9) "randomizer.glm"
#include using(LOAD=R1-12_47-1_load_10) "randomizer.glm"
#include using(LOAD=R1-12_47-1_load_11) "randomizer.glm"
#include using(LOAD=R1-12_47-1_load_12) "randomizer.glm"
#include using(LOAD=R1-12_47-1_load_13) "randomizer.glm"
#include using(LOAD=R1-12_47-1_load_14) "randomizer.glm"
#include using(LOAD=R1-12_47-1_load_15) "randomizer.glm"
#include using(LOAD=R1-12_47-1_load_16) "randomizer.glm"
#include using(LOAD=R1-12_47-1_load_17) "randomizer.glm"
#include using(LOAD=R1-12_47-1_load_18) "randomizer.glm"
#include using(LOAD=R1-12_47-1_load_19) "randomizer.glm"
#include using(LOAD=R1-12_47-1_load_20) "randomizer.glm"
