// generated by create_loads.py
#include using(LOAD=R2-12-47-3_load_1) "randomizer.glm"
#include using(LOAD=R2-12-47-3_load_2) "randomizer.glm"
#include using(LOAD=R2-12-47-3_load_3) "randomizer.glm"
#include using(LOAD=R2-12-47-3_load_4) "randomizer.glm"
#include using(LOAD=R2-12-47-3_load_5) "randomizer.glm"
#include using(LOAD=R2-12-47-3_load_6) "randomizer.glm"
#include using(LOAD=R2-12-47-3_load_7) "randomizer.glm"
#include using(LOAD=R2-12-47-3_load_8) "randomizer.glm"
#include using(LOAD=R2-12-47-3_load_9) "randomizer.glm"
#include using(LOAD=R2-12-47-3_load_10) "randomizer.glm"
#include using(LOAD=R2-12-47-3_load_11) "randomizer.glm"
